# LAMMPS input script for ReaxFF one simulation
# Generated by PoreReax package

{% if SIMNUMBER == 0 %}
boundary p p p
units real
atom_style full
read_data system.data
{% else %}
read_restart reax_run_{{ SIMNUMBER - 1 }}.data
{% endif %}

pair_style reaxff NULL safezone 3.0 mincap 150
pair_coeff * * reax.ffield {{ ATOMS }}
fix myqeq all qeq/reaxff 1 0.0 10.0 1.0e-6 reaxff maxiter 400

timestep {{ TIMESTEP }}

thermo {{ THERMO_FREQ }}
thermo_style custom step temp press pe ke etotal vol density
dump trajdump all custom {{ DUMP_FREQ }} reax_run_{{ SIMNUMBER }}.lammpstrj id type x y z vx vy vz
fix myspec all reaxff/species {{ DUMP_FREQ }} 1 {{ DUMP_FREQ }} reax_run_{{ SIMNUMBER }}.species element {{ ATOMS }}
fix bond all reaxff/bonds {{ DUMP_FREQ }} reax_run_{{ SIMNUMBER }}.bonds
fix removeMom all momentum {{ DUMP_FREQ }} linear 1 1 1 rescale
{% if SIMULATIONTYPE == "nvt" %}
fix nvt all nvt temp {{ TEMP }} {{ TEMP }} 100.0
{% elif SIMULATIONTYPE == "npt" %}
fix npt all npt temp {{ TEMP }} {{ TEMP }} 100.0 iso {{ PRESS }} {{ PRESS }} 1000.0
{% elif SIMULATIONTYPE == "nve" %}
fix nve all nve
{% endif %}
run {{ NSTEPS }}

undump trajdump
unfix myspec
unfix bond
unfix removeMom
{% if SIMULATIONTYPE == "npt" %}
unfix npt
{% elif SIMULATIONTYPE == "nve" %}
unfix nve
{% elif SIMULATIONTYPE == "nvt" %}
unfix nvt
{% endif %}
write_restart reax_run_{{ SIMNUMBER }}.data
